*Heading
** Job name: Biaxial Model name: Biaxial
** Generated by: Abaqus/CAE 2020
*Preprint, echo=NO, model=NO, history=NO, contact=NO
**
** PARTS
**
*Part, name=Part-1
*Node
      1,   1.51499999,   1.42999995,           1.
      2,    2.4849999,   1.42999995,           1.
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*Element, type=C3D8R
   1,   84, 1351, 1305,    1,  461, 3394, 3348,   22
   2, 1351, 1352, 1306, 1305, 3394, 3395, 3349, 3348
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*Nset, nset=_PickedSet13, internal
     1,     2,     3,     4,     5,     6
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*Elset, elset=_PickedSet13, internal, generate
  2169,  10000,      1
*Nset, nset=_PickedSet14, internal
    1,    2,    3,    4,    5,    6
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*Elset, elset=_PickedSet14, internal, generate
    1,  2168,     1
** Section: Low
*Solid Section, elset=_PickedSet14, material=Low
,
** Section: High
*Solid Section, elset=_PickedSet13, material=High
,
*End Part
**
**
** ASSEMBLY
**
*Assembly, name=Assembly
**
*Instance, name=Part-1-1, part=Part-1
*End Instance
**
*Nset, nset=_PickedSet17, internal, instance=Part-1-1, generate
     1,  20402,      1
*Elset, elset=_PickedSet17, internal, instance=Part-1-1, generate
     1,  10000,      1
*Nset, nset=_PickedSet18, internal, instance=Part-1-1
   25,   28,   29,   30,  612,  613
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*Elset, elset=_PickedSet18, internal, instance=Part-1-1
 2169, 2170, 2171, 2172, 2173, 2174
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*Nset, nset=_PickedSet19, internal, instance=Part-1-1
   25,   26,   27,   28,   29,   30
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*Elset, elset=_PickedSet19, internal, instance=Part-1-1
 2196, 2224, 2252, 2280, 2308, 2336
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*End Assembly
**
** MATERIALS
**
*Material, name=High
*Elastic
1000., 0.3
*Plastic
 60.,0.
560.,1.
*Material, name=Low
*Elastic
1000., 0.3
*Plastic
 50.,0.
550.,1.
** ----------------------------------------------------------------
**
** STEP: Step-1
**
*Step, name=Step-1, nlgeom=NO
*Static
1., 1., 1e-05, 1.
**
** BOUNDARY CONDITIONS
**
** Name: BC-1 Type: Displacement/Rotation
*Boundary
_PickedSet17, 3, 3
** Name: BC-2 Type: Displacement/Rotation
*Boundary
_PickedSet18, 1, 1
_PickedSet18, 2, 2
** Name: BC-3 Type: Displacement/Rotation Using Analytical Field: AnalyticalField-1
*Boundary
Part-1-1.25, 1, 1
Part-1-1.26, 1, 1, 0.5
Part-1-1.27, 1, 1, 0.5
Part-1-1.28, 1, 1
Part-1-1.29, 1, 1
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Part-1-1.1304, 2, 2
**
** OUTPUT REQUESTS
**
*Restart, write, frequency=0
**
** FIELD OUTPUT: F-Output-1
**
*Output, field, variable=PRESELECT
**
** HISTORY OUTPUT: H-Output-1
**
*Output, history, variable=PRESELECT
*End Step
